<?xml version="1.0"?>
<Node name="root" dt="0.01" gravity="0 -9.81 0">

    <Node name="plugins">
        <RequiredPlugin pluginName="Sofa.Component.Constraint.Projective"/> <!-- Needed to use components [FixedProjectiveConstraint] -->
        <RequiredPlugin pluginName="Sofa.Component.Engine.Select"/> <!-- Needed to use components [BoxROI] -->
        <RequiredPlugin pluginName="Sofa.Component.LinearSolver.Direct"/> <!-- Needed to use components [SparseLDLSolver] -->
        <RequiredPlugin pluginName="Sofa.Component.Mass"/> <!-- Needed to use components [MeshMatrixMass] -->
        <RequiredPlugin pluginName="Sofa.Component.SolidMechanics.FEM.Elastic"/>
        <RequiredPlugin pluginName="Sofa.Component.StateContainer"/> <!-- Needed to use components [MechanicalObject] -->
        <RequiredPlugin pluginName="Sofa.Component.Topology.Container.Constant"/> <!-- Needed to use components [MeshTopology] -->
        <RequiredPlugin pluginName="Sofa.Component.Topology.Container.Grid"/> <!-- Needed to use components [RegularGridTopology] -->
        <RequiredPlugin pluginName="Sofa.Component.Topology.Mapping"/> <!-- Needed to use components [Hexa2PrismTopologicalMapping] -->
        <RequiredPlugin pluginName="Sofa.Component.Visual"/> <!-- Needed to use components [VisualMesh] -->
    </Node>

    <DefaultAnimationLoop/>
    <VisualStyle displayFlags="showBehaviorModels showForceFields" />

    <VisualGrid size="0.1"/>
    <LineAxis size="0.1"/>
    <OglSceneFrame/>

    <EulerImplicitIntegrationScheme name="backward Euler" rayleighStiffness="0.1" rayleighMass="0.1" />
    <SparseLDLSolver/>

    <RegularGridTopology name="grid" min="-0.01 -0.01 0" max="0.01 0.01 0.2" n="5 5 30"/>
    <MechanicalObject template="Vec3" name="state" showObject="true"/>

    <MeshMatrixMass massDensity="1100"/>

    <Node name="prisms">
        <MeshTopology name="prism_topology"/>
        <Hexa2PrismTopologicalMapping input="@grid" output="@prism_topology" />

        <PrismCorotationalFEMForceField name="FEM" youngModulus="2e6" poissonRatio="0.45" topology="@prism_topology"
                                        rotationMethod="polar" computeForceStrategy="sequenced" computeForceDerivStrategy="sequenced"/>

        <VisualMesh position="@../state.position" topology="@prism_topology" enable="true"/>
    </Node>

    <BoxROI template="Vec3" name="box_roi" box="-0.011 -0.011 -0.0001   0.011 0.011 0.0001" drawBoxes="1" />
    <FixedProjectiveConstraint template="Vec3" indices="@box_roi.indices" />
</Node>
